// COMSOL Multiphysics 5.3.1.201 model "4TurbulentTransient.mph"
// Outline of the model tree

Functions
  int1: Interpolation "v0"
    funcname = v0
    table = 
      {7, 1.83}
      {8, 1.83}
      {9, 1.84}
      {10, 1.85}
      {11, 1.86}
      {12, 1.85}
      {13, 1.85}
      {14, 1.88}
      {15, 1.85}
      {16, 1.89}
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    argunit = s
    fununit = m/s

Geometry
  geom1 "Geometry 1" (2D, length unit m)
    r1: Rectangle | size = {1.5, 0.05}
    r2: Rectangle | pos = {0, 00.05}; size = {1.5, 0.05}
    r3: Rectangle | pos = {0, 0.0275}; size = {0.001, 0.045}
    uni1: Union | input = r1, r2, r3
    fin: Finalize "Form Union"

Materials
  mat1: Common "Air" on all domains
    def "Basic"
      relpermeability = 1
      relpermittivity = 1
      dynamicviscosity = eta(T[1/K])[Pa*s]
      ratioofspecificheat = 1.4
      electricconductivity = 0[S/m]
      heatcapacity = Cp(T[1/K])[J/(kg*K)]
      density = rho(pA[1/Pa],T[1/K])[kg/m^3]
      thermalconductivity = k(T[1/K])[W/(m*K)]
      soundspeed = cs(T[1/K])[m/s]
      eta: Piecewise | arg = T; pieces = {200.0, 1600.0, -8.38278E-7+8.35717342E-8*T^1-7.69429583E-11*T^2+4.6437266E-14*T^3-1.06585607E-17*T^4}
      Cp: Piecewise | arg = T; pieces = {200.0, 1600.0, 1047.63657-0.372589265*T^1+9.45304214E-4*T^2-6.02409443E-7*T^3+1.2858961E-10*T^4}
      rho: Analytic | expr = pA*0.02897/R_const[K*mol/J]/T; args = {pA, T}; dermethod = manual; argders = {{pA, d(pA*0.02897/R_const/T,pA)}, {T, d(pA*0.02897/R_const/T,T)}}
      k: Piecewise | arg = T; pieces = {200.0, 1600.0, -0.00227583562+1.15480022E-4*T^1-7.90252856E-8*T^2+4.11702505E-11*T^3-7.43864331E-15*T^4}
      cs: Analytic | expr = sqrt(1.4*287*T); args = T; dermethod = manual; argders = {T, d(sqrt(1.4*287*T),T)}
    RefractiveIndex
      n = 1
      ki = 0

Physics
  spf: TurbulentFlowv2f on all domains
    dependent variable u = {u, v, w}
    fp1: FluidProperties (default)
    init1: init "Initial Values 1" (default) | p_init = 100000
    wallbc1: WallBC "Wall 1" (default)
    inl1: InletBoundary "Inlet 1" on boundaries 3, 5 | U0in = v0(t)
    out1: OutletBoundary "Outlet 1" on boundaries 13, 14 | p0 = 100000

Mesh
  mesh1 "Mesh 1"
    size: MeshSizeDefault | table = cfd; hmax = 0.0035; hmin = 1.0E-4; hcurve = 0.3; hgrad = 1.13; hauto = 4
    size1: Size on boundaries 1, 2, 7, 9 | table = cfd; hmax = 0.0028; hmin = 4.0E-5; hcurve = 0.25; hauto = 3
    cr1: CornerRefinement on domains 1-4 | boundary = boundaries 1, 2, 7, 9
    ftri1: FreeTri "Free Triangular 1" on remaining entities
    bl1: BndLayer "Boundary Layers 1" on domains 1-3
      blp1: BndLayerProp "Boundary Layer Properties 1" on boundaries 1, 2, 7, 9
        blnlayers = 6
        blhminfact = 2
        blhmin = 0.0101

Studies
  std1 "Study 1"
    wdi: WallDistanceInitialization
    time: Transient "Time Dependent" | tlist = range(0,0.1,1); initialtime = 0